<?xml version="1.0"?>

<?xml-stylesheet type="text/xsl" href="http://jsbsim.sourceforge.net/JSBSim.xsl"?>

<fdm_config name="PC-9M" version="2.0" release="BETA"
  xmlns:xsi="http://www.w3.org/2001/XMLSchema-instance"
  xsi:noNamespaceSchemaLocation="http://jsbsim.sourceforge.net/JSBSim.xsd">

  <fileheader>
    <author> Erik Hofman, David Culp </author>
    <filecreationdate> 01-01-2011 </filecreationdate>
    <version>$Revision: 1.9 $</version>
    <description> Models a PC-9M </description>
  </fileheader>

<!--
  File:     PC-9M.xml
  Inputs:
    name:          PC-9M
    type:          Single engine WWII Fighter, Military Trainer, Aerobatic, Air Racer
    stall speed:   77.21kts
    max weight:    7056.00 lb
    length:        33.27 ft
    wing:
     span:         33.22 ft
     area:         175.34 sq-ft
     mean chord:   4.77 ft
     aspect ratio: 6.29:1
     taper ratio:  0.75:1
     incidence:    1.00 degrees
     dihedral:     7.00 degrees
     sweep:        1.00 degrees

    no. engines:   1
    engine type:   Turboprop Engine
    engine layout: forward fuselage

    gear type:     tricycle
    steering type: steering
    retractable?:  yes

  Outputs:
    wing loading:       40.24 lb/sq-ft
     - thickness ratio: 6.86%
    payload:            2391.54 lbs
    CL-alpha:           5.18 per radian
    CL-0:               0.44
    CL-max:             1.99
    CD-0:               0.01
    K:                  0.06
    Mcrit:              0.75
-->

<!--
    References:

    N. van Bronswijk., A.D. Snowden, H.A. Keating. and G.J. Brian
    "A Correlation between Flight-determined Longitudinal and Lateral
     Derivatives and Wind Tunnel Data for the Pilatus PC 9/A Training
     Aircraft in Approach and Departure Congurations"
    http://dspace.dsto.defence.gov.au/dspace/bitstream/1947/4010/1/DSTO-TR-0479%20PR.pdf

    The structural reference point is located 0.8 meter before the spinner
    (3 meter from the firewall) and 2 meters below C.G.
-->

 <metrics>
   <wingarea  unit="M2">     16.29 </wingarea>
   <wingspan  unit="M" >     10.124 </wingspan>
   <wing_incidence>           1.00 </wing_incidence>
   <chord     unit="M" >      1.65 </chord>
   <htailarea unit="M2">      2.77 </htailarea>
   <htailarm  unit="M" >      5.97 </htailarm>
   <vtailarea unit="M2">      1.63 </vtailarea>
   <vtailarm  unit="M" >      5.97 </vtailarm>
   <location name="AERORP" unit="IN">
     <x>   201.18 </x>
     <y>     0.00 </y>
     <z>     0.00 </z>
   </location>
   <location name="EYEPOINT" unit="IN">
     <x>   111.78 </x>
     <y>     0.00 </y>
     <z>    40.00 </z>
   </location>
   <location name="VRP" unit="IN">
     <x>     0.0 </x>
     <y>     0.0 </y>
     <z>     0.0 </z>
   </location>
 </metrics>

 <mass_balance>
   <ixx unit="KG*M2">    2505.9 </ixx>
   <iyy unit="KG*M2">    6522.2 </iyy>
   <izz unit="KG*M2">    8467.1 </izz>
   <ixy unit="KG*M2">      49.0 </ixy>
   <ixz unit="KG*M2">     169.9 </ixz>
   <iyz unit="KG*M2">       3.0 </iyz>
   <emptywt unit="KG" >  1866.1 </emptywt>
   <location name="CG" unit="IN">
     <x>   201.18 </x>
     <y>     0.00 </y>
     <z>    -9.98 </z>
   </location>
   <pointmass name="Payload">
    <description> 2391.54 LBS should bring model up to entered max weight </description>
    <weight unit="LBS"> 1195.77 </weight>
    <location name="POINTMASS" unit="IN">
     <x>   201.18 </x>
     <y>     0.00 </y>
     <z>    -9.98 </z>
   </location>
  </pointmass>
  </mass_balance>

  <ground_reactions>
<!--
     <contact type="STRUCTURE" name="NOSE">
       <location unit="M">
       <x> 0.8 </x>
       <y> 0.0 </y>
       <z> 2.5 </z>
       </location>
       <static_friction>  0.80 </static_friction>
       <dynamic_friction> 0.50 </dynamic_friction>
       <spring_coeff unit="LBS/FT">     5940.00 </spring_coeff>
       <damping_coeff unit="LBS/FT/SEC">  1188.00 </damping_coeff>
    </contact>
-->
    <contact type="BOGEY" name="NOSE_LG">
    <location unit="IN">
      <x>    51.90 </x>
      <y>     0.00 </y>
      <z>   -47.91 </z>
      </location>
      <static_friction> 0.8 </static_friction>
      <dynamic_friction> 0.5 </dynamic_friction>
      <rolling_friction> 0.02 </rolling_friction>
      <spring_coeff  unit="LBS/FT">     2116.80 </spring_coeff>
      <damping_coeff unit="LBS/FT/SEC"> 1058.40 </damping_coeff>
      <max_steer unit="DEG"> 80 </max_steer>
      <brake_group> NONE </brake_group>
      <retractable>1</retractable>
    </contact>
    <contact type="BOGEY" name="LEFT_MLG">
    <location unit="IN">
      <x>   209.23 </x>
      <y>   -59.79 </y>
      <z>   -47.91 </z>
      </location>
      <static_friction> 0.8 </static_friction>
      <dynamic_friction> 0.5 </dynamic_friction>
      <rolling_friction> 0.02 </rolling_friction>
      <spring_coeff  unit="LBS/FT">     7056.00 </spring_coeff>
      <damping_coeff unit="LBS/FT/SEC"> 3528.00 </damping_coeff>
      <max_steer unit="DEG"> 0.0 </max_steer>
      <brake_group> LEFT </brake_group>
      <retractable>1</retractable>
    </contact>
    <contact type="BOGEY" name="RIGHT_MLG">
    <location unit="IN">
      <x>   209.23 </x>
      <y>    59.79 </y>
      <z>   -47.91 </z>

      </location>
      <static_friction> 0.8 </static_friction>
      <dynamic_friction> 0.5 </dynamic_friction>
      <rolling_friction> 0.02 </rolling_friction>
      <spring_coeff  unit="LBS/FT">     7056.00 </spring_coeff>
      <damping_coeff unit="LBS/FT/SEC"> 3528.00 </damping_coeff>
      <max_steer unit="DEG"> 0.0 </max_steer>
      <brake_group> RIGHT </brake_group>
      <retractable>1</retractable>
    </contact>
<!--
    <contact type="STRUCTURE" name="LEFT_WING">
       <location unit="M">
       <x>  4.4225 </x>
       <y> -5.062  </y>
       <z>  2.0    </z>
       </location>
       <static_friction>  0.80 </static_friction>
       <dynamic_friction> 0.50 </dynamic_friction>
       <spring_coeff unit="LBS/FT">     5940.00 </spring_coeff>
       <damping_coeff unit="LBS/FT/SEC">  1188.00 </damping_coeff>
    </contact>
    <contact type="STRUCTURE" name="RIGHT_WING">
      <location unit="M">
       <x>  4.4225 </x>
       <y>  5.062  </y>
       <z>  2.0   </z>
       </location>
       <static_friction>  0.80 </static_friction>
       <dynamic_friction> 0.50 </dynamic_friction>
       <spring_coeff unit="LBS/FT">     5940.00 </spring_coeff>
       <damping_coeff unit="LBS/FT/SEC">  1188.00 </damping_coeff>
    </contact>
-->
  </ground_reactions>

  <propulsion>
   <engine file="PT6A-25">
     <location unit="IN">
      <x>    36.00 </x>
      <y>     0.00 </y>
      <z>     0.00 </z>
    </location>
    <orient unit="DEG">
      <pitch>     0.00 </pitch>
       <roll>     0.00 </roll>
        <yaw>     0.00 </yaw>
    </orient>
    <feed> 0 </feed>
    <feed> 1 </feed>

    <thruster file="Propeller-3blade">
     <sense> 1 </sense>
     <location unit="IN">
      <x>    36.00 </x>
      <y>     0.00 </y>
      <z>     0.00 </z>
     </location>
     <orient unit="DEG">
       <pitch>     0.00 </pitch>
        <roll>     0.00 </roll>
         <yaw>     0.00 </yaw>
     </orient>
    </thruster>
   </engine>

<!--
   <engine file="PT6A-62">
     <location unit="IN">
      <x>    36.00 </x>
      <y>     0.00 </y>
      <z>     0.00 </z>
    </location>
    <orient unit="DEG">
      <pitch>     0.00 </pitch>
       <roll>     0.00 </roll>
        <yaw>     0.00 </yaw>
    </orient>
    <feed> 0 </feed>
    <feed> 1 </feed>

    <thruster file="Propeller-4blade">
     <sense> 1 </sense>
     <location unit="IN">
      <x>    36.00 </x>
      <y>     0.00 </y>
      <z>     0.00 </z>
     </location>
     <orient unit="DEG">
       <pitch>     0.00 </pitch>
        <roll>     0.00 </roll>
         <yaw>     0.00 </yaw>
     </orient>
    </thruster>
   </engine>

   <engine file="PT6A-68">
     <location unit="IN">
      <x>    36.00 </x>
      <y>     0.00 </y>
      <z>     0.00 </z>
    </location>
    <orient unit="DEG">
      <pitch>     0.00 </pitch>
       <roll>     0.00 </roll>
        <yaw>     0.00 </yaw>
    </orient>
    <feed> 0 </feed>
    <feed> 1 </feed>

    <thruster file="Propeller-4blade">
     <sense> 1 </sense>
     <location unit="IN">
      <x>    36.00 </x>
      <y>     0.00 </y>
      <z>     0.00 </z>
     </location>
     <orient unit="DEG">
       <pitch>     0.00 </pitch>
        <roll>     0.00 </roll>
         <yaw>     0.00 </yaw>
     </orient>
    </thruster>
   </engine>
-->

   <engine file="PT6A-exhaust">
     <location unit="IN">
      <x>    36.00 </x>
      <y>     0.00 </y>
      <z>     0.00 </z>
    </location>
    <orient unit="DEG">
      <pitch>     0.00 </pitch>
       <roll>     0.00 </roll>
        <yaw>     0.00 </yaw>
    </orient>
    <feed> 0 </feed>
    <feed> 1 </feed>

    <thruster file="direct">
     <sense> 1 </sense>
     <location unit="IN">
      <x>    36.00 </x>
      <y>     0.00 </y>
      <z>     0.00 </z>
     </location>
     <orient unit="DEG">
       <pitch>     0.00 </pitch>
        <roll>     0.00 </roll>
         <yaw>     0.00 </yaw>
     </orient>
    </thruster>
   </engine>

   <tank type="FUEL" number="0">
     <location unit="IN">
       <x>   201.18 </x>
       <y>     0.00 </y>
       <z>    -9.98 </z>
     </location>
     <capacity unit="KG"> 237.5 </capacity>
     <contents unit="KG"> 175.0 </contents>
   </tank>
   <tank type="FUEL" number="1">
     <location unit="IN">
       <x>   201.18 </x>
       <y>     0.00 </y>
       <z>    -9.98 </z>
     </location>
     <capacity unit="KG"> 237.5 </capacity>
     <contents unit="KG"> 175.0 </contents>
   </tank>
  </propulsion>

  <system file="Conventional Controls.xml"/>
  <system file="Landing Gear.xml"/>
  <system file="Speedbrake.xml"/>
  <system file="Flaps.xml"/>
  <system file="nws"/>
  <system file="particles"/>
  <system file="canopy"/>

  <flight_control name="FCS: PC-9M">
  </flight_control>

  <aerodynamics>

  <function name="aero/function/kCDge">
      <description>Change_in_drag_due_to_ground_effect</description>
      <product>
            <table>
                <independentVar>aero/h_b-mac-ft</independentVar>
                <tableData>
                    0.0000        0.4800
                    0.1000        0.5150
                    0.1500        0.6290
                    0.2000        0.7090
                    0.3000        0.8150
                    0.4000        0.8820
                    0.5000        0.9280
                    0.6000        0.9620
                    0.7000        0.9880
                    0.8000        1.0000
                    0.9000        1.0000
                    1.0000        1.0000
                    1.1000        1.0000
                </tableData>
            </table>
      </product>
  </function>

  <function name="aero/function/kCLge">
      <description>Change_in_lift_due_to_ground_effect</description>
      <product>
            <table>
                <independentVar>aero/h_b-mac-ft</independentVar>
                <tableData>
                    0.0000        1.2030
                    0.1000        1.1270
                    0.1500        1.0900
                    0.2000        1.0730
                    0.3000        1.0460
                    0.4000        1.0550
                    0.5000        1.0190
                    0.6000        1.0130
                    0.7000        1.0080
                    0.8000        1.0060
                    0.9000        1.0030
                    1.0000        1.0020
                    1.1000        1.0000
                </tableData>
            </table>
      </product>
  </function>

  <function name="aero/function/velocity-induced-fps">
    <description> velocity including the propulsion induced velocity.</description>
    <sum>
      <property>velocities/u-aero-fps</property>
      <property>propulsion/engine/prop-induced-velocity_fps</property>
      <property>propulsion/engine/prop-induced-velocity_fps</property>
    </sum>
  </function>

  <function name="aero/function/qbar-induced-psf">
    <description> q bar including the propulsion induced velocity.</description>
    <product>
      <property>aero/function/velocity-induced-fps</property>
      <property>aero/function/velocity-induced-fps</property>
      <property>atmosphere/rho-slugs_ft3</property>
      <value>0.5</value>
    </product>
  </function>

  <axis name="DRAG">

    <!-- CD0 is based on fuselage, wing, horizontal- en vertical tail -->
    <!-- Antennas, struts and wires are not taken into account        -->
    <!-- CD for gear (fixed and retractable) is defined below         -->
    <function name="aero/force/Drag_zero_lift">
       <description>Drag at zero lift</description>
       <product>
          <property>aero/qbar-psf</property>
          <property>metrics/Sw-sqft</property>
          <value> 0.0144 </value>
       </product>
    </function>

    <function name="aero/force/Drag_alpha">
       <description>Drag due to alpha</description>
       <product>
          <property>aero/qbar-psf</property>
          <property>metrics/Sw-sqft</property>
          <table>
            <independentVar lookup="row">aero/alpha-rad</independentVar>
            <tableData>
             -1.57    1.4104
             -0.30    0.0703
              0.00    0.0000
              0.30    0.0703
              1.57    1.4104
            </tableData>
          </table>
       </product>
    </function>

    <function name="aero/force/Drag_induced">
       <description>Induced drag</description>
         <product>
           <property>aero/function/qbar-induced-psf</property>
           <property>metrics/Sw-sqft</property>
           <property>aero/cl-squared</property>
           <property>aero/function/kCDge</property>
           <value> 0.0515 </value>
         </product>
    </function>

    <function name="aero/force/Drag_mach">
       <description>Drag due to mach</description>
        <product>
          <property>aero/qbar-psf</property>
          <property>metrics/Sw-sqft</property>
          <table>
            <independentVar lookup="row">velocities/mach</independentVar>
            <tableData>
                0.00    0.0000
                0.75    0.0000
                1.10    0.0230
                1.80    0.0150
            </tableData>
          </table>
        </product>
    </function>

    <function name="aero/force/Drag_beta">
       <description>Drag due to sideslip</description>
       <product>
          <property>aero/qbar-psf</property>
          <property>metrics/Sw-sqft</property>
          <table>
            <independentVar lookup="row">aero/beta-rad</independentVar>
            <tableData>
              -1.57    1.2300
              -0.26    0.0500
               0.00    0.0000
               0.26    0.0500
               1.57    1.2300
            </tableData>
          </table>
       </product>
    </function>

    <function name="aero/force/Drag_elevator">
       <description>Drag due to Elevator Deflection</description>
       <product>
           <property>aero/qbar-psf</property>
           <property>metrics/Sw-sqft</property>
           <abs><property>fcs/elevator-pos-rad</property></abs>
           <value> 0.0400 </value>
       </product>
    </function>

    <function name="aero/force/Drag_gear">
       <description>Drag due to gear</description>
         <product>
           <property>aero/qbar-psf</property>
           <property>metrics/Sw-sqft</property>
           <property>gear/gear-pos-norm</property>
           <value> 0.0300 </value>
         </product>
    </function>

    <function name="aero/force/Drag_flap">
       <description>Drag due to flaps</description>
         <product>
           <property>aero/qbar-psf</property>
           <property>metrics/Sw-sqft</property>
           <property>fcs/flap-pos-deg</property>
           <property>aero/function/kCDge</property>
           <value> 0.0012 </value>
         </product>
    </function>

    <function name="aero/coefficient/Drag_speedbrake">
       <description>Drag due to speedbrakes</description>
         <product>
           <property>aero/qbar-psf</property>
           <property>metrics/Sw-sqft</property>
           <property>fcs/speedbrake-pos-norm</property>
           <property>aero/function/kCDge</property>
           <value> 0.03 </value>
         </product>
    </function>
  </axis>

  <axis name="SIDE">
    <function name="aero/force/Side_beta">
       <description>Side force due to beta</description>
       <product>
           <property>aero/qbar-psf</property>
           <property>metrics/Sw-sqft</property>
           <property>aero/beta-rad</property>
           <table>
            <independentVar lookup="row">fcs/flap-pos-deg</independentVar>
            <tableData>			<!-- DSTO -->
              0.0    -0.7563
             23.0    -0.9397
             50.0    -1.0428
            </tableData>
           </table>
       </product>
    </function>

    <function name="aero/force/Side_beta_gear">
       <description>Side force due to gear and beta</description>
       <product>
           <property>aero/qbar-psf</property>
           <property>metrics/Sw-sqft</property>
           <property>aero/beta-rad</property>
           <property>gear/gear-pos-norm</property>
           <value> -0.1490 </value> 	<!-- DSTO -->
       </product>
    </function>

    <function name="aero/force/Side_roll_rate">
       <description>Side_force_due_to_roll_rate</description>
       <product>
           <property>aero/qbar-psf</property>
           <property>metrics/Sw-sqft</property>
           <property>aero/bi2vel</property>
           <property>velocities/p-aero-rad_sec</property>
           <table>
             <independentVar lookup="row">aero/Re</independentVar>
             <tableData>
                 3840413   0.2465
                 4224454   0.16
             </tableData>
           </table>
       </product>
    </function>

    <function name="aero/force/Side_yaw_rate">
       <description>Side_force_due_to_yaw_rate</description>
       <product>
           <property>aero/qbar-psf</property>
           <property>metrics/Sw-sqft</property>
           <property>aero/bi2vel</property>
           <property>velocities/r-aero-rad_sec</property>
           <value> 0.34 </value>
       </product>
    </function>


    <function name="aero/force/Side_rudder">
       <description>Side_force_due_to_rudder</description>
       <product>
           <property>aero/qbar-psf</property>
           <property>metrics/Sw-sqft</property>
           <property>fcs/rudder-pos-rad</property>
           <value> 0.1937 </value>	<!-- DSTO -->
       </product>
    </function>

    <function name="aero/force/Side_rudder_speedbrake">
       <description>Side force due to speedbrake and rudder</description>
       <product>
           <property>aero/qbar-psf</property>
           <property>metrics/Sw-sqft</property>
           <property>fcs/rudder-pos-rad</property>
           <property>fcs/speedbrake-pos-norm</property>
           <value> 0.01146 </value>	<!-- DSTO -->
       </product>
    </function>

    <function name="aero/force/Delta_Side_rudder_gear">
       <description>Side force due to rudder and gear</description>
       <product>
           <property>aero/qbar-psf</property>
           <property>metrics/Sw-sqft</property>
           <property>fcs/rudder-pos-rad</property>
           <property>gear/gear-pos-norm</property>
           <value> -0.035526 </value>	<!-- DSTO -->
       </product>
    </function>
  </axis>

  <axis name="LIFT">
    <function name="aero/force/Lift_propwash">
      <description>Delta lift due to propeller induced velocity</description>
      <product>
         <property>propulsion/engine[0]/thrust-coefficient</property>
          <property>aero/qbar-psf</property>
          <property>metrics/Sw-sqft</property>
          <property>aero/function/kCLge</property>
          <table>
            <independentVar lookup="row">aero/alpha-rad</independentVar>
            <independentVar lookup="column">fcs/flap-pos-deg</independentVar>
            <tableData>
                     0.0     60.0
              -0.30  0.000   0.000
               0.00  0.102   0.271
               0.34  0.461   1.230
               0.69  0.000   0.000
            </tableData>
          </table>
      </product>
    </function>

    <function name="aero/force/Lift_alpha">
      <description>Lift due to alpha</description>
      <product>
          <property>aero/qbar-psf</property>
          <property>metrics/Sw-sqft</property>
          <property>aero/function/kCLge</property>
          <table>
            <independentVar lookup="row">aero/alpha-rad</independentVar>
            <tableData>
              -1.57  0.0000
              -1.22 -0.5987
              -1.05 -0.8066
              -0.88 -0.9314
              -0.68 -0.6219
              -0.38 -1.5547
               0.00  0.4389
               0.30  1.9937
               0.60  1.0608
               0.88  1.0686
               1.05  0.9254
               1.22  0.6869
               1.57  0.0000
            </tableData>
          </table>
      </product>
    </function>

    <function name="aero/force/Lift_pitch_rate">
        <description>Lift_due_to_pitch_rate</description>
        <product>
          <property>aero/qbar-psf</property>
          <property>metrics/Sw-sqft</property>
          <property>velocities/q-aero-rad_sec</property>
          <property>aero/ci2vel</property>
          <value> 8.4666 </value>
        </product>
      </function>

      <function name="aero/force/Lift_alpha_rate">
        <description>Lift_due_to_alpha_rate</description>
        <product>
           <property>aero/qbar-psf</property>
           <property>metrics/Sw-sqft</property>
           <property>aero/alphadot-rad_sec</property>

           <property>aero/ci2vel</property>
           <value> 4.0852 </value>
        </product>
      </function>

    <function name="aero/force/Lift_elevator">
       <description>Lift due to Elevator Deflection</description>
       <product>
           <property>aero/qbar-psf</property>
           <property>metrics/Sw-sqft</property>
           <property>fcs/elevator-pos-rad</property>
           <value> 0.7985 </value>
       </product>
    </function>

    <function name="aero/force/Lift_flap">
       <description>Delta Lift due to flaps</description>
       <product>
           <property>aero/qbar-psf</property>
           <property>metrics/Sw-sqft</property>
           <property>fcs/flap-pos-deg</property>
           <value> 0.0092 </value>
       </product>
    </function>

    <function name="aero/coefficient/Lift_speedbrake">
       <description>Delta Lift due to speedbrake</description>
       <product>
           <property>aero/qbar-psf</property>
           <property>metrics/Sw-sqft</property>
           <property>fcs/speedbrake-pos-norm</property>
           <value> 0.018 </value>
       </product>
    </function>

  </axis>

  <axis name="ROLL">
    <function name="aero/moment/Roll_differential_propwash">
       <description>Roll moment due to differential propwash</description>
       <product>
           <property>propulsion/engine[0]/thrust-coefficient</property>
           <property>aero/qbar-psf</property>
           <property>metrics/Sw-sqft</property>
           <property>metrics/bw-ft</property>
           <property>aero/alpha-rad</property>
           <value> 0.0164 </value>
       </product>
    </function>

    <function name="aero/moment/Roll_beta">
       <description>Roll moment due to beta</description>
       <product>
           <property>aero/qbar-psf</property>
           <property>metrics/Sw-sqft</property>
           <property>metrics/bw-ft</property>
           <property>aero/beta-rad</property>
           <value> -0.0802 </value> 	<!-- DSTO -->
       </product>
    </function>

    <function name="aero/moment/Roll_damp">
       <description>Roll moment due to roll rate</description>
       <product>
           <property>aero/qbar-psf</property>
           <property>metrics/Sw-sqft</property>
           <property>metrics/bw-ft</property>
           <property>aero/bi2vel</property>
           <property>velocities/p-aero-rad_sec</property>
           <value> -0.4750 </value>	<!-- DSTO -->
       </product>
    </function>

    <function name="aero/moment/Roll_yaw">
       <description>Roll moment due to yaw rate</description>
       <product>
           <property>aero/qbar-psf</property>
           <property>metrics/Sw-sqft</property>
           <property>metrics/bw-ft</property>
           <property>aero/bi2vel</property>
           <property>velocities/r-aero-rad_sec</property>
           <table>
            <independentVar lookup="row">fcs/flap-pos-deg</independentVar>
            <tableData>
              0.0     0.1200		<!-- DSTO -->
             23.0     0.1700
             50.0     0.2700
            </tableData>
           </table>
       </product>
    </function>

    <function name="aero/moment/Roll_yaw_gear">
       <description>Roll moment due to gear and yaw rate</description>
       <product>
           <property>aero/qbar-psf</property>
           <property>metrics/Sw-sqft</property>
           <property>metrics/bw-ft</property>
           <property>aero/bi2vel</property>
           <property>velocities/r-aero-rad_sec</property>
           <property>gear/gear-pos-norm</property>
           <value> 0.0140 </value>	<!-- DSTO -->
       </product>
    </function>

    <function name="aero/moment/Roll_aileron">
       <description>Roll moment due to aileron</description>
       <product>
          <property>aero/qbar-psf</property>
          <property>metrics/Sw-sqft</property>
          <property>metrics/bw-ft</property>
          <property>fcs/left-aileron-pos-rad</property>
          <value> 0.0991 </value>
       </product>
    </function>

    <function name="aero/moment/Roll_rudder">
       <description>Roll moment due to rudder</description>
       <product>
           <property>aero/qbar-psf</property>
           <property>metrics/Sw-sqft</property>
           <property>metrics/bw-ft</property>
           <property>fcs/rudder-pos-rad</property>
           <value> 0.0100 </value>
       </product>
    </function>
  </axis>

  <axis name="PITCH">
    <function name="aero/moment/Pitch_propwash">
      <description>Pitch moment due to propeller induced velocity</description>
      <product>
          <property>propulsion/engine[0]/thrust-coefficient</property>
          <property>aero/qbar-psf</property>
          <property>metrics/Sw-sqft</property>
          <property>metrics/bw-ft</property>
          <table>
            <independentVar lookup="row">aero/alpha-rad</independentVar>
            <independentVar lookup="column">fcs/flap-pos-deg</independentVar>
            <tableData>
                     0.0     60.0
              -0.04  0.000   0.000
               0.00 -0.105  -0.279
               0.34 -0.475  -1.267
               0.45  0.000   0.000
            </tableData>
          </table>
      </product>
    </function>

    <function name="aero/moment/Pitch_alpha">
       <description>Pitch moment due to alpha</description>
       <product>
           <property>aero/qbar-psf</property>
           <property>metrics/Sw-sqft</property>
           <property>metrics/cbarw-ft</property>
           <property>aero/alpha-rad</property>
           <table>
            <independentVar lookup="row">fcs/flap-pos-deg</independentVar>
            <tableData>
              0.0     -0.3741		<!-- DSTO -->
             50.0     -0.8594
            </tableData>
           </table>
       </product>
    </function>

    <function name="aero/moment/Pitch_alpha_gear">
       <description>Pitch moment due to gear and alpha</description>
       <product>
           <property>aero/qbar-psf</property>
           <property>metrics/Sw-sqft</property>
           <property>metrics/cbarw-ft</property>
           <property>aero/alpha-rad</property>
           <property>gear/gear-pos-norm</property>
           <value> -0.4853 </value>
       </product>
    </function>

    <function name="aero/moment/Pitch_elevator">
       <description>Pitch moment due to elevator</description>
       <product>
          <property>aero/function/qbar-induced-psf</property>
          <property>metrics/Sw-sqft</property>
          <property>metrics/cbarw-ft</property>
          <property>fcs/elevator-pos-rad</property>
          <table>
            <independentVar lookup="row">fcs/flap-pos-deg</independentVar>
            <independentVar lookup="column">gear/gear-pos-norm</independentVar>
            <tableData>
                      0.0	1.0		<!-- DSTO -->
              0.0    -1.1058	-1.3293
             23.0    -1.4897	-1.9367
             50.0    -1.3923	-1.3293
            </tableData>
          </table>
       </product>
    </function>

    <function name="aero/moment/Pitch_speedbrake">
       <description>Pitch moment due to speedbrake</description>
       <product>
          <property>aero/qbar-psf</property>
          <property>metrics/Sw-sqft</property>
          <property>metrics/cbarw-ft</property>
          <property>fcs/speedbrake-pos-norm</property>
          <value> 0.31 </value>
       </product>
    </function>

    <function name="aero/moment/Pitch_damp">
       <description>Pitch moment due to pitch rate</description>
       <product>
           <property>aero/qbar-psf</property>
           <property>metrics/Sw-sqft</property>
           <property>metrics/cbarw-ft</property>
           <property>aero/ci2vel</property>
           <property>velocities/q-aero-rad_sec</property>
           <value> -15.3 </value>
       </product>
    </function>

    <function name="aero/moment/Pitch_alphadot">
       <description>Pitch moment due to alpha rate</description>
       <product>
           <property>aero/qbar-psf</property>
           <property>metrics/Sw-sqft</property>
           <property>metrics/cbarw-ft</property>
           <property>aero/ci2vel</property>
           <property>aero/alphadot-rad_sec</property>
           <value> -14.1367 </value>
       </product>
    </function>
  </axis>

  <axis name="YAW">

    <!-- Stall initiator -->
    <function name="aero/moment/Yaw_alpha">
       <description>Yaw_moment_due_alpha</description>
       <product>
           <property>aero/qbar-psf</property>
           <property>metrics/Sw-sqft</property>
           <property>metrics/bw-ft</property>
           <property>aero/alpha-rad</property>
           <property>fcs/gear-no-wow</property>
           <table>
             <independentVar lookup="row">aero/beta-rad</independentVar>
             <independentVar lookup="column">aero/Re</independentVar>
             <tableData>
                          3960426  4356469
                 -0.3491     -1.0      0.0
                  0.3491      1.0      0.0
             </tableData>
           </table>
       </product>
    </function>

    <function name="aero/moment/Yaw_beta">
       <description>Yaw moment due to beta</description>
       <product>
           <property>aero/qbar-psf</property>
           <property>metrics/Sw-sqft</property>
           <property>metrics/bw-ft</property>
           <property>aero/beta-rad</property>
           <table>
            <independentVar lookup="row">fcs/flap-pos-deg</independentVar>
            <tableData>
              0.0     0.0825		<!-- DSTO -->
             23.0     0.1369
             50.0     0.1730
            </tableData>
           </table>
       </product>
    </function>

    <function name="aero/moment/Delta_Yaw_beta_gear">
       <description>Yaw moment due to gear and beta</description>
       <product>
           <property>aero/qbar-psf</property>
           <property>metrics/Sw-sqft</property>
           <property>metrics/bw-ft</property>
           <property>aero/beta-rad</property>
           <property>gear/gear-pos-norm</property>
           <value> 0.0464 </value>	<!-- DSTO  -->
       </product>
    </function>

    <function name="aero/moment/Yaw_roll_rate">
       <description>Yaw_moment_due_to_roll_rate</description>
       <product>
           <property>aero/qbar-psf</property>
           <property>metrics/Sw-sqft</property>
           <property>metrics/bw-ft</property>
           <property>aero/bi2vel</property>
           <property>velocities/p-rad_sec</property>
           <value> -0.0556 </value>
       </product>
    </function>

    <function name="aero/moment/Delta_Yaw_roll_rate_gear">
       <description>Yaw moment due to gear and roll rate</description>
       <product>
           <property>aero/qbar-psf</property>
           <property>metrics/Sw-sqft</property>
           <property>metrics/bw-ft</property>
           <property>aero/bi2vel</property>
           <property>velocities/p-rad_sec</property>
           <property>gear/gear-pos-norm</property>
           <value> -0.0444 </value>	<!-- DSTO -->
       </product>
    </function>

    <function name="aero/moment/Delta_Yaw_roll_rate_speedbrake">
       <description>Yaw moment due to speedbrake and roll rate</description>
       <product>
           <property>aero/qbar-psf</property>
           <property>metrics/Sw-sqft</property>
           <property>metrics/bw-ft</property>
           <property>aero/bi2vel</property>
           <property>velocities/p-rad_sec</property>
           <property>fcs/speedbrake-pos-norm</property>
           <value> -0.0185 </value>	<!-- DSTO -->
       </product>
    </function>

    <function name="aero/moment/Yaw_damp">
       <description>Yaw moment due to yaw rate</description>
       <product>
           <property>aero/qbar-psf</property>
           <property>metrics/Sw-sqft</property>
           <property>metrics/bw-ft</property>
           <property>aero/bi2vel</property>
           <property>velocities/r-aero-rad_sec</property>
           <table>
            <independentVar lookup="row">fcs/flap-pos-deg</independentVar>
            <tableData>			<!-- DSTO -->
              0.0    -0.211
             23.0    -0.193
             50.0    -0.129
            </tableData>
           </table>
       </product>
    </function>

    <function name="aero/moment/Delta_Yaw_damp_gear">
       <description>Yaw moment due to gear and yaw rate</description>
       <product>
           <property>aero/qbar-psf</property>
           <property>metrics/Sw-sqft</property>
           <property>metrics/bw-ft</property>
           <property>aero/bi2vel</property>
           <property>velocities/r-aero-rad_sec</property>
           <property>gear/gear-pos-norm</property>
           <value> 0.0014 </value>	<!-- DSTO -->
       </product>
    </function>

    <function name="aero/moment/Yaw_rudder">
       <description>Yaw moment due to rudder</description>
       <product>
           <property>aero/function/qbar-induced-psf</property>
           <property>metrics/Sw-sqft</property>
           <property>metrics/bw-ft</property>
           <property>fcs/rudder-pos-rad</property>
           <value> -0.1089 </value>	<!-- DSTO -->
       </product>
    </function>

    <function name="aero/moment/Yaw_aileron">
       <description>Adverse yaw</description>
       <product>
           <property>aero/qbar-psf</property>
           <property>metrics/Sw-sqft</property>
           <property>metrics/bw-ft</property>
           <property>fcs/left-aileron-pos-rad</property>
           <value> -0.0030 </value>
       </product>
    </function>
  </axis>

  </aerodynamics>
</fdm_config>
